dj1 := ((35 + 19i)*(5.6 + 7.8) + (27 + 13.8i)*7.8)/(11.8 + 5.6 + 7.8)
dj3 := ((35 + 19i)*(5.6 + 7.8) + (27 + 13.8i)*7.8)/(11.8 + 5.6 + 7.8)
dj1 = 26.9683 + 14.3746i
dj3 = 26.9683 + 14.3746i
dj2 := ((35 + 19i)*11.8 + (27 + 13.8i)*(11.8 + 5.6))/(11.8 + 5.6 + 7.8)
dj4 := ((35 + 19i)*11.8 + (27 + 13.8i)*(11.8 + 5.6))/(11.8 + 5.6 + 7.8)
dj2 = 35.0317 + 18.4254i
dj4 = 35.0317 + 18.4254i
