S_p1 := 31.765 + 1i*10.92
S_p2 := 34.7 + 1i*11.05
z_дж1.1 := 0.33 - 1i*3.97
z_1.2 := 2.87 - 1i*6.09
z_дж2.2 := 1.43 - 1i*4.82
S_1 := (S_p1*(z_1.2 + z_дж2.2) + S_p2*z_дж2.2)/(z_дж1.1 + z_1.2 + z_дж2.2) = 34.4739 + 13.3733i
S_2 := (S_p1*z_дж1.1 + S_p2*(z_дж1.1 + z_1.2))/(z_дж1.1 + z_1.2 + z_дж2.2) = 31.9911 + 8.5967i
S_1 + S_2 = 66.465 + 21.97i
S_p1 + S_p2 = 66.465 + 21.97i
